Simulations: Version=186
  Simulation KiwiTest
    Weather: FileName=20993_Lincoln_Had_RCPpast.met; Latitude=-43.625; Tav=11.9; Amp=10.4
    Clock: Start=1987-07-01; End=1997-06-30
    Summary
    SoilArbitrator Soil Arbitrator
    Zone Block: Area=1; Slope=0; AspectAngle=0; Altitude=50
      Report: EventNames=[Clock].DoReport
        VariableNames:
          [KiwiFruit].Leaf.Wt
          [KiwiFruit].Leaf.Canopy.Height
          [Clock].Today
      Plant KiwiFruit
      Fertiliser
      SurfaceOrganicMatter: InitialResidueName=wheat_stubble; InitialResidueType=wheat; InitialResidueMass=500; InitialStandingFraction=0; InitialCPR=0; InitialCNR=100
      Irrigation
      MicroClimate: a_interception=0; b_interception=1; c_interception=0; d_interception=0; SoilHeatFluxFraction=0.4; MinimumHeightDiffForNewLayer=0; NightInterceptionFraction=0.5; ReferenceHeight=2
      BiomassRemovalEvents OnDefoliate: PlantToRemoveBiomassFrom=KiwiFruit; RemovalType=1
        BiomassRemovals:
          PlantName  OrganName  TypeString  LiveToRemove  DeadToRemove  LiveToResidue  DeadToResidue
          KiwiFruit  Leaf       Grazing     0.3           0             0.3            1
          KiwiFruit  Root       Grazing     0             0             0              0
          KiwiFruit  Trunk      Grazing     0             0             0              0
          KiwiFruit  Product    Grazing     1             0             1              0
      BiomassRemovalEvents OnHarvestAndPrune: PlantToRemoveBiomassFrom=KiwiFruit; RemovalType=2
        BiomassRemovals:
          PlantName  OrganName  TypeString  LiveToRemove  DeadToRemove  LiveToResidue  DeadToResidue
          KiwiFruit  Leaf       Harvesting  0             0             1              1
          KiwiFruit  Root       Harvesting  0             0             0              0
          KiwiFruit  Trunk      Harvesting  0             0             0              0
          KiwiFruit  Product    Harvesting  0.8           0             0.2            0
      BiomassRemovalEvents OnEndCrop: PlantToRemoveBiomassFrom=KiwiFruit; RemovalType=4
        BiomassRemovals:
          PlantName  OrganName  TypeString  LiveToRemove  DeadToRemove  LiveToResidue  DeadToResidue
          KiwiFruit  Leaf       EndCrop     0             0             1              1
          KiwiFruit  Root       EndCrop     0             0             1              1
          KiwiFruit  Trunk      EndCrop     0             0             1              1
          KiwiFruit  Product    EndCrop     0             0             1              1
      Manager ReportOnEvents
```csharp
using Models.Core;
using System;
using Models.PMF.Phen;

namespace Models
{
    [Serializable]
    public class Script : Model
    {
        //> Links to other Apsim models
        [Link(ByName = true)] Report stages; 
        
        public string StageName {get; set;}
        
        private void setAndOutput(PhaseChangedType change)
        {
           StageName = change.StageName;
    	   stages.DoOutput();
        }
        
        [EventSubscribe("PhaseChanged")]
        private void OnPhaseChanged(object sender, PhaseChangedType change)
        {
        	if (change.StageName == "Waiting") {setAndOutput(change);}
        	if (change.StageName == "StartGrowth") {setAndOutput(change);}
        	if (change.StageName == "FullCanopy") {setAndOutput(change);}
        	if (change.StageName == "StartSenescence") {setAndOutput(change);}
        	if (change.StageName == "Maturity") {setAndOutput(change);}
        	if (change.StageName == "ReStart") {setAndOutput(change);}
        	if (change.StageName == "Dormancy") {setAndOutput(change);}
        }
        
        [EventSubscribe("ParallelPhaseChanged")]
        private void OnParallelPhaseChanged(object sender, PhaseChangedType change)
        {
        	if (change.StageName == "StartFlowering"){setAndOutput(change);}
        	if (change.StageName == "StartReproductive"){setAndOutput(change);}
        	if (change.StageName == "EndReproductive"){setAndOutput(change);}
        }
	}
}
```
      Manager Reset on date
        ResetWater = True
        ResetNutrients = True
        ResetSOM = True
```csharp
using Models.Soils.Nutrients;
using APSIM.Shared.Utilities;
using Models.Surface;
using Models.Utilities;
using Models.Soils.Nutrients;
using Models.Soils;
using Models.PMF;
using Models.Core;
using System;
using System.Linq;
using Models.Interfaces;
using Models.PMF.Phen;
using System.Diagnostics;

namespace Models
{
    [Serializable]
    public class Script : Model
    {
        [Link] private Clock Clock;
        [Link] private Plant Wheat;
        [Link] private ISoilWater SoilWater;
        [Link] private Nutrient nutrient;
        [Link] private SurfaceOrganicMatter SOM;
        [Link] private Summary Summary;

        [Description("Reset Water? (Yes or No)")]
        public bool ResetWater {get;set;}

        [Description("Reset Soil Nutrients ? (Yes or No)")]
        public bool ResetNutrients {get;set;}

        [Description("Reset Surface Organic Matter? (Yes or No)")]
        public bool ResetSOM {get;set;}

        [EventSubscribe("PhaseChanged")]
        private void OnDoManagement(object sender, PhaseChangedType pct)
        {
            if (pct.StageName == "StartGrowth")
            {
                if (ResetWater == true)
                {
                    Summary.WriteMessage(this, "Reset Water", MessageType.Diagnostic);
                    SoilWater.Reset();
                }
                if (ResetNutrients == true)
                {
                    Summary.WriteMessage(this, "Reset Nitrogen", MessageType.Diagnostic);
                    nutrient.Reset();
                }
                if (ResetSOM == true)
                {
                    Summary.WriteMessage(this, "Reset Surface OM", MessageType.Diagnostic);
                    SOM.Reset();
                }
            }
        }
    }
}
```
      Report Stages
      Soil: Latitude=0; Longitude=0
        LayerStructure: Thickness=[200, 200, 200, 200, 200, 200, 300, 300, 400, 800]
        Chemical: Thickness=[100, 200, 300, 300, 300, 300]; PH=[6.6, 6.2, 5.7, 5.5, 5.5, 5.5]; PHUnits=Water
        Water: Thickness=[300, 300, 300, 300, 300, 300, 1200]; InitialValues=[0.3, 0.21, 0.18, 0.17, 0.17, 0.17, 0.17]; InitialPAWmm=114; RelativeTo=LL15; FilledFromTop=false
        WaterBalance SoilWater: SummerDate=1-Nov; SummerU=9; SummerCona=4.4; WinterDate=1-Apr; WinterU=9; WinterCona=4.4; DiffusConst=88; DiffusSlope=35.4; Salb=0.3; CN2Bare=68; CNRed=20; CNCov=0.8; DischargeWidth=0; CatchmentArea=0; PSIDul=-100
          Thickness  SWCON  KLAT
          300        0.55   0
          300        0.55   0
          300        0.55   0
          300        0.55   0
          300        0.1    0
          300        0.02   0
          400        0.02   0
          800        0      0
        Organic: FOMCNRatio=30; CarbonUnits=Total
          Thickness  Carbon  SoilCNRatio  FBiom  FInert  FOM
          100        1.82    11.5         0.025  0.3     1243.931
          200        1.47    11.5         0.025  0.4     833.832
          300        1.2     11.5         0.015  0.75    457.617
          300        1.03    11.5         0.01   0.9     251.145
          300        0.47    11.5         0.01   0.96    137.831
          300        0.47    11.5         0.01   0.96    75.644
        CERESSoilTemperature Temperature
        OutputLayers: Thickness=[300, 300, 300, 300, 300, 300]
        Solute NO3: Thickness=[100, 200, 300, 300, 300, 300]; InitialValues=[217, 15, 1.66667, 1.66667, 0, 0]; InitialValuesUnits=ppm; WaterTableConcentration=0; D0=0; DepthConstant=0; MaxDepthSoluteAccessible=0; RunoffEffectivenessAtMovingSolute=0; MaxEffectiveRunoff=0
        Solute NH4: Thickness=[100, 200, 300, 300, 300, 300]; InitialValues=[0, 0, 0, 0, 0, 0]; InitialValuesUnits=ppm; WaterTableConcentration=0; D0=0; DepthConstant=0; MaxDepthSoluteAccessible=0; RunoffEffectivenessAtMovingSolute=0; MaxEffectiveRunoff=0
        Solute Urea: Thickness=[100, 200, 300, 300, 300, 300]; InitialValues=[0, 0, 0, 0, 0, 0]; InitialValuesUnits=kg/ha; WaterTableConcentration=0; D0=0; DepthConstant=0; MaxDepthSoluteAccessible=0; RunoffEffectivenessAtMovingSolute=0; MaxEffectiveRunoff=0
        Physical
          Thickness  BD  AirDry  LL15  DUL  SAT  KS
          300        1   0.15    0.15  0.3  0.4  100
          300        1   0.15    0.15  0.3  0.4  100
          300        1   0.15    0.15  0.3  0.4  50
          300        1   0.15    0.15  0.3  0.4  40
          300        1   0.15    0.15  0.3  0.4  40
          300        1   0.15    0.15  0.3  0.4  40
          1200       1   0.15    0.15  0.3  0.4  40
          SoilCrop KiwiFruitSoil: LL=[0.15, 0.15, 0.15, 0.15, 0.15, 0.15, 0.15]; KL=[1, 1, 1, 1, 1, 1, 1]; XF=[1, 1, 1, 1, 1, 1, 1]
        Nutrient
      Manager AutomaticIrrigation
        allowIrrigation = True
        seasonStart = 1-Aug
        seasonEnd = 30-May
        seasonsAllocation = 1000
        triggerDeficit = 70
        targetDeficit = 95
        returndays = 3
        maximumAmount = 30
        depthPAWC = 650
```csharp
using Newtonsoft.Json;
using APSIM.Shared.Utilities;
using System.Xml.Serialization;
using Models.Soils;
using Models.PMF;
using Models.Core;
using System;
using System.Linq;
using Models.Interfaces;



        
namespace Models
{
    [Serializable] 
    [System.Xml.Serialization.XmlInclude(typeof(Model))]
    public class Script : Model
    {
        [Link] private ISummary summary;
        [Link] private Irrigation Irrigation;
        [Link] private Clock Clock;
        [Link] private Soil Soil;
        [Link(IsOptional = true)] private IPlant existingCrop;
        private DateTime StartDate;
        private DateTime EndDate;
        private double TopDUL;
        private double TopLL;
        private int nLayers;
        [Link]
        private IPhysical soilPhysical;
        [Link]
        private ISoilWater waterBalance;
        //Communication to other modules
       
        //User inputs from properties tab
        [Description("Turn irrigation on?")]
        public bool allowIrrigation { get; set; }
        [Description("Start of irrigation season (dd-MMM)")]
        public string seasonStart { get; set; }
        [Description("End of irrigation season (dd-MMM)")]
        public string seasonEnd { get; set; }
        [Description("Season allocation (mm)")]
        public double seasonsAllocation { get; set; }
        [Description("Deficit to trigger irrigation (% PAWC)")]
        public double triggerDeficit { get; set; }
        [Description("Deficit to stop irrigaton (% PAWC)")]
        public double targetDeficit { get; set; }
        [Description("Minimum days for irrigation to return")]
        public double returndays { get; set; }
        [Description("Maximum irrigation application (mm/day)")]
        public double maximumAmount { get; set; }
        [Description("Depth to calculate PAWC (mm)")]
        public double depthPAWC { get; set; }

        //Class members
        [JsonIgnore] public double TopSWdeficit { get; set; }
        [JsonIgnore] public double TopSWC { get; set; }
        [JsonIgnore] public double DaysSinceIrrigation { get; set; }
        [JsonIgnore] public double AmountToApply { get; set; }
        [JsonIgnore] public double SeasonAppliedAmount { get; set; }
        
        private bool IrrigationIsAllowed { get; set; }
        private bool SeasonIsOpen { get; set; }
        private bool CropIsActive { get; set; }
        private bool IrrigatorIsAvailable { get; set; }
        private bool SoilIsDry { get; set; }

    
        //Calculate static soil variables
        [EventSubscribe("StartOfSimulation")]
        private void OnStartOfSimulation(object sender, EventArgs e)
        {   
            //Set the season dates
            StartDate = DateTime.Parse(seasonStart + "-" + Clock.Today.Year.ToString());
            EndDate = DateTime.Parse(seasonEnd + "-" + Clock.Today.Year.ToString());
            
            //Can we irrigate at all?
            IrrigationIsAllowed = false; 
            if (allowIrrigation)
                IrrigationIsAllowed = true; 

            //Calculate soil water variables
            double depthFromSurface = 0.0;
            double fracLayer = 0.0;
            nLayers = soilPhysical.Thickness.Length;
            for (int layer = 0; layer < nLayers; layer++)
            {
                fracLayer = Math.Min(1.0, (depthPAWC - depthFromSurface) / soilPhysical.Thickness[layer]);
                TopLL += soilPhysical.LL15mm[layer] * fracLayer;
                TopDUL += soilPhysical.DULmm[layer] * fracLayer;
                depthFromSurface += soilPhysical.Thickness[layer];
                if (depthFromSurface >= depthPAWC)
                    layer = nLayers;
            }
        }
             
        //Determine daily requirement for irrigation
        [EventSubscribe("StartOfDay")]
        private void OnStartOfDay(object sender, EventArgs e)
        {
            //Can we irrigate today?          
            SeasonIsOpen = isBetween(Clock.Today, StartDate, EndDate);
            if (!SeasonIsOpen)
                SeasonAppliedAmount = 0;

            //Is there a crop in the ground that needs irrigation?
            CropIsActive = false;
            if ((existingCrop != null) && (existingCrop.IsAlive))
                CropIsActive = true;
            //if ((existingCrop.Phenology.Stage >= 3.0) && (existingCrop.Phenology.Stage < 6.0))
          
            //Is the irrigator available?
            IrrigatorIsAvailable = false;
            DaysSinceIrrigation += 1;
            if (DaysSinceIrrigation >= returndays)
                IrrigatorIsAvailable = true;
          
            //Is the soil dry enough to require irrigation?
            SoilIsDry = false;
            double depthFromSurface = 0.0;
            double fracLayer = 0.0;
            TopSWC = 0.0;
            for (int layer = 0; layer < nLayers; layer++)
            //for (int layer = 0; depthFromSurface < depthPAWC + soilPhysical.Thickness[layer]; layer++)
            {
                fracLayer = Math.Min(1.0, (depthPAWC - depthFromSurface) / soilPhysical.Thickness[layer]);
                TopSWC += waterBalance.SWmm[layer] * fracLayer;
                depthFromSurface += soilPhysical.Thickness[layer];
                if (depthFromSurface >= depthPAWC)
                    layer = nLayers;
            }
            
            TopSWdeficit = TopSWC - TopDUL;
            if (Math.Max(0.0, -TopSWdeficit) >= (TopDUL - TopLL) * (100 - triggerDeficit) / 100)
                SoilIsDry = true;
                
            //Are all the conditions ratifying irrigation
            if (IrrigationIsAllowed && SeasonIsOpen && CropIsActive && IrrigatorIsAvailable && SoilIsDry)
            {
                //Lets bloody well irrigate then!!!!
                AmountToApply = TopDUL * targetDeficit / 100 - TopSWC;
                AmountToApply = Math.Max(0.0, Math.Min(AmountToApply, seasonsAllocation - SeasonAppliedAmount));
                AmountToApply = Math.Min(AmountToApply,maximumAmount);
                Irrigation.Apply(AmountToApply);
                DaysSinceIrrigation = 0;
                SeasonAppliedAmount += AmountToApply;
            }
        }
        
        ///Checks whether theDate is between iniDate and endDate (non-year specific)
        private bool isBetween(DateTime theDay, DateTime iniDate, DateTime endDate)
        {
            bool result = false;
            if (iniDate.DayOfYear < endDate.DayOfYear)
            {
                // period is within one year, ex: summer in the northern hemisphere
                if ((theDay.DayOfYear >= iniDate.DayOfYear) && (theDay.DayOfYear <= endDate.DayOfYear))
                    result = true;
            }
            else
            {
                // period goes over the end of the year, ex: summer in the southern hemisphere
                if ((theDay.DayOfYear >= iniDate.DayOfYear) || (theDay.DayOfYear <= endDate.DayOfYear))
                    result = true;
            }
            
            return result;
        }
    }
}
```
      Manager FactorLabels
        AGENT_NO = 999
        Lat = 999
        Lon = 999
        SoilStamp = SiltLoam
        GCM = ERA
        RCP = ERA
        TS = BaseLine
```csharp
using Models.Soils;
using Models.Core;
using System;

namespace Models
{
    [Serializable]
    public class Script : Model
    {
        //> Links to other Apsim models
        [Link] Clock Clock;
        [Link] ISummary mySummary;

        //> User inputs from properties tab
        [Separator("Tags used to defined simulation factors")]
        [Description("Agent number: ")]
        public string AGENT_NO { get; set; }
        [Description("Latitude: ")]
        public string Lat { get; set; }
        [Description("Longitude: ")]
        public string Lon { get; set; }
        [Description("SoilStamp: ")]
        public string SoilStamp { get; set; }
        [Description("GCM: ")]
        public string GCM { get; set; }
        [Description("RCP: ")]
        public string RCP { get; set; }
        [Description("Time slice: ")]
        public string TS { get; set; }

        //> Internal variables
        private string someVar;
        
        [EventSubscribe("DoManagementCalculations")]
        private void OnDoManagementCalculations(object sender, EventArgs e)
        {
            // Sort out time slice classification
            if ((Clock.Today.Date.Year <= 2005))
            {
                TS = "Baseline";
            }
            else
            {
                TS = "Future";
            }
        }
    }
}
```
      Manager AutomaticFertiliser
        EachYear = True
        Dates = 30-nov, 15-apr
        UseCritNThreshold = False
        CritNThreshold = 50
        CritNDepth = 75
        Depth = 50
        Amount = 25
        FertiliserType = UreaN
```csharp
using Models.Interfaces;
using System.Linq;
using APSIM.Shared.Utilities;
using Models.PMF;
using Models.Soils;
using Models.Core;
using System;
using Models.Soils.Nutrients;

namespace Models
{
    [Serializable]
    public class Script : Model
    {
        [Link] private Clock clock;
        [Link] private Fertiliser fertiliser;
        [Link] private ISummary summary;
        [Link] private Soil soil;
        private Nutrient nutrient;
        [Link]
        private IPhysical soilPhysical;


        [Separator("Fertiliser will be applied on the date(s) below")]
        [Description("Apply fertiliser on the same day(s) each year? If no, then must include the year of appliaction below")]
        public bool EachYear { get; set; }

        [Description("Dates for one or more fertiliser applications (dd-mmm or dd-mmm-yyyy) as a list with a comma between dates")]
        public string[] Dates { get; set; }

        [Separator("Test for the mineral N in the soil and don't apply the fertiliser if greater than X kgN/ha is stored in the soil above a depth of Y mm")]
        [Description("Use a critical soil mineral N to prevent application above a threshold?")]
        public bool UseCritNThreshold { get; set; }

        [Description("Don't add fertiliser if N in the soil to the depth below exceeds (kg/ha)")]
        public double CritNThreshold { get; set; }

        [Description("Depth to which the amount of N in the soil should be calculated (mm)")]
        public double CritNDepth { get; set; }

        [Separator("Fertiliser application details")]
        [Description("Depth at which to apply the fertiliser (mm)")]
        public double Depth { get; set; }

        [Description("Amount of fertiliser to apply (kg N /ha) per application")]
        public double Amount { get; set; }

        [Description("Fertiliser type - select from the list")]
        public Fertiliser.Types FertiliserType { get; set; }


        [EventSubscribe("StartOfSimulation")]
        private void FindSoilNOrNutrient(object sender, EventArgs e)
        {
            nutrient = this.FindInScope<Nutrient>() as Nutrient;

            if (nutrient == null)
                throw new Exception(string.Format("Error in script {0}: Unable to find nutrient.", Name));
        }

        [EventSubscribe("DoManagement")]
        private void OnDoManagement(object sender, EventArgs e)
        {
            if (OnApplicationDate())
            {
                if (NContentBelowThreshold())
                    fertiliser.Apply(Amount, FertiliserType, Depth);
                else
                    summary.WriteMessage(this, "Skipping fertiliser application due to soil mineral N content being above critical threshold.", MessageType.Diagnostic);
            }
        }

        /// <summary>Checks if today's date is one of the specified fertiliser application dates.</summary>
        private bool OnApplicationDate()
        {
            if (EachYear)
                return Dates.Any(d => DateUtilities.DatesEqual(d, clock.Today));
            
            DateTime[] dates = Dates.Select(d => DateTime.ParseExact(d, "d-MMM-yyyy", null)).ToArray();
            return dates.Any(d => SameDate(d, clock.Today));
        }

        /// <summary>Checks if N content in soil is below critical threshold.</summary>
        private bool NContentBelowThreshold()
        {
            if (!UseCritNThreshold)
                return true;
            
            double[] weights = GetLayerWeights();
            double cumSoilN = 0;

            for (int i = 0; i < soilPhysical.Thickness.Length; i++)
            {
                cumSoilN += weights[i] * nutrient.MineralN[i];
            }

            return cumSoilN <= CritNThreshold;
        }

        private double[] GetLayerWeights()
        {
            double[] weights = new double[soilPhysical.Thickness.Length];
            double cumDepth = 0;

            for (int i = 0; i < soilPhysical.Thickness.Length; i++)
            {
                cumDepth += soilPhysical.Thickness[i];
                if (cumDepth < CritNDepth)
                    weights[i] = 1;
                else if (cumDepth - soilPhysical.Thickness[i] <= CritNDepth)
                    weights[i] = (CritNDepth - (cumDepth - soilPhysical.Thickness[i])) / soilPhysical.Thickness[i];
                else
                    weights[i] = 0;
            }

            return weights;
        }

        private bool SameDate(DateTime d1, DateTime d2)
        {
            return d1.Year == d2.Year && d1.DayOfYear == d2.DayOfYear;
        }
    }
}
```
      Manager WaterStatus
        DepthToMonitorFollowRoots = False
        MinimumDepth = 0
        DepthToMonitor = 600
```csharp
using Newtonsoft.Json;
using Models.PMF.Phen;
using Models.Soils.Nutrients;
using System.Linq;
using System;
using Models.Core;
using Models.PMF;
using Models.Soils;
using System.Xml.Serialization;
using APSIM.Shared.Utilities;
using Models.PMF.Organs;
using Models.Interfaces;

        
namespace Models
{
    [Serializable] 
    [System.Xml.Serialization.XmlInclude(typeof(Model))]
    public class Script : Model
    {      
        [Link] private Zone myZone;
        [Link] private Clock Clock;
        [Link] private ISummary summary;
        [Link] private IPhysical soilPhysical;
        [Link] private ISoilWater waterBalance;

        //User inputs from properties tab
        [Description("Depth to monitor soil moisture is based on root depth?")]
        public bool DepthToMonitorFollowRoots { get; set; }
        [Description("Minimum depth to monitor soil moisture (mm):")]
        [Display(VisibleCallback = "usingRootDepth")]
        public double MinimumDepth { get; set; }
        [Description("Depth to monitor soil moisture (mm):")]
        [Display(VisibleCallback = "usingGivenDepth")]
        public double DepthToMonitor { get; set; }

        //Class members
        [JsonIgnore][Units("mm")] public double SoilWaterContentOfMonitoredLayer { get; set; }
        [JsonIgnore][Units("mm")] public double SoilAvailableWaterOfMonitoredLayer { get; set; }
        [JsonIgnore][Units("mm")] public double RelativeSoilMoistureOfMonitoredLayer { get; set; }
        [JsonIgnore][Units("mm")] public double SoilWaterDeficitOfMonitoredLayer { get; set; }
        //[JsonIgnore][Units("dry/moist/wet")] public string SoilStatusOfMonitoredLayer { get; set; }
        [JsonIgnore][Units("0 or 1")] public double SoilStatusOfMonitoredLayer { get; set; }


        private int indexBottomOfMonitoredLayer;
        private double fractionBottomOfMonitoredLayer;
        private double lowerLimitOfMonitoredLayer;
        private double upperLimitOfMonitoredLayer;
        private double depthOfMonitoredLayer;
        
        private bool usingRootDepth  { get { return DepthToMonitorFollowRoots; } }
        private bool usingGivenDepth { get { return !DepthToMonitorFollowRoots; } }


        [EventSubscribe("StartOfSimulation")]
        private void OnStartOfSimulation(object sender, EventArgs e)
        {
            // check the depth to monitor
            depthOfMonitoredLayer = DepthToMonitor;
            if (DepthToMonitorFollowRoots)
            {
                depthOfMonitoredLayer = MinimumDepth;
            }

            // get some soil water variables
            getMonitoredLayerParams(depthOfMonitoredLayer);
       }

       //[EventSubscribe("StartOfDay")]
        [EventSubscribe("EndOfDay")]
        private void OnStartOfDay(object sender, EventArgs e)
        {
            // check whether depth to monitor varies
            if (DepthToMonitorFollowRoots)
            {
                // check root depth
                double currentRootDepth = 0.0;
                foreach (Plant species in myZone.FindAllChildren<Plant>().OfType<IModel>().ToList())
                {
                    if (species.IsAlive)
                    {
                        double thisRootDepth = (double)myZone.Get("[" + species.Name + "].Root.Depth");
                        currentRootDepth = Math.Max(currentRootDepth, thisRootDepth);
                    }
                }
                currentRootDepth = Math.Min(MinimumDepth, currentRootDepth);
                
                if (Math.Abs(currentRootDepth - depthOfMonitoredLayer) > 0.001)
                { // update some soil water variables
                    depthOfMonitoredLayer = currentRootDepth;
                    getMonitoredLayerParams(depthOfMonitoredLayer);
                }
            }

            // get current soil moisture
            SoilWaterContentOfMonitoredLayer = 0.0;
            for (int layer = 0; layer < indexBottomOfMonitoredLayer; layer++)
            {
                SoilWaterContentOfMonitoredLayer += waterBalance.SWmm[layer];
            }

            SoilWaterContentOfMonitoredLayer += waterBalance.SWmm[indexBottomOfMonitoredLayer] * fractionBottomOfMonitoredLayer;

            // compute soil water deficit and available water
            SoilWaterDeficitOfMonitoredLayer = SoilWaterContentOfMonitoredLayer - upperLimitOfMonitoredLayer;
            SoilAvailableWaterOfMonitoredLayer = SoilWaterContentOfMonitoredLayer - lowerLimitOfMonitoredLayer;
            RelativeSoilMoistureOfMonitoredLayer = SoilAvailableWaterOfMonitoredLayer/(upperLimitOfMonitoredLayer - lowerLimitOfMonitoredLayer);

            // check the water status
            if (RelativeSoilMoistureOfMonitoredLayer >= 1.0)
            {
                //SoilStatusOfMonitoredLayer = "wet";
                SoilStatusOfMonitoredLayer = 1.0;
            }
            else if (RelativeSoilMoistureOfMonitoredLayer >= 0.5)
            {
                //SoilStatusOfMonitoredLayer = "moist";
                SoilStatusOfMonitoredLayer = 0.0;
            }
            else
            {
                //SoilStatusOfMonitoredLayer = "dry";
                SoilStatusOfMonitoredLayer = 0.0;
            }
        }
              
        
        ///<summary>Computes a selection of soil params over the given depth.</summary>
        private void getMonitoredLayerParams(double depthToCompute)
        {
            // Calculate some soil water variables
            double depthFromSurface = 0.0;
            lowerLimitOfMonitoredLayer = 0.0;
            upperLimitOfMonitoredLayer = 0.0;
            for (int layer = 0; layer < soilPhysical.Thickness.Length; layer++)
            {
                fractionBottomOfMonitoredLayer = Math.Min(1.0, (depthToCompute - depthFromSurface) / soilPhysical.Thickness[layer]);
                lowerLimitOfMonitoredLayer += soilPhysical.LL15mm[layer] * fractionBottomOfMonitoredLayer;
                upperLimitOfMonitoredLayer += soilPhysical.DULmm[layer] * fractionBottomOfMonitoredLayer;
                depthFromSurface += soilPhysical.Thickness[layer];
                if (depthFromSurface >= depthToCompute)
                {
                    indexBottomOfMonitoredLayer = layer;
                    layer = soilPhysical.Thickness.Length;
                }
            }
        }
       
    }
}
```
      Manager SowDateCv
        InitialRootDepth = 5
        CropToSow = Heywood
        SowingDate = 07/01/1987 00:00:00
```csharp
using Models.Soils;
using System;
using Models.Core;
using System.Collections.Generic;
using System.Text;
using Models.PMF;
using Models;
using System.Xml.Serialization;
using APSIM.Shared.Utilities;
using System.Data;
using Models.PMF.Interfaces;
using Models.Surface;

namespace Models
{
    [Serializable] 
    //[System.Xml.Serialization.XmlInclude(typeof(Model))]
    public class Script : Model
    {
        [Link] Plant KiwiFruit;
        [Link] Clock Clock;
        [Link] Zone zone;
        [Link] Simulation Simulation;
        [Link] SurfaceOrganicMatter SurfOM;
        
                
        [Description("Initial Root Depth")]
        public double InitialRootDepth { get; set; }
        [Description("Sown Crop")]
        public string CropToSow { get; set; }
        [Description("Sowing Date")]
        public DateTime SowingDate { get; set; }
        
        
        [EventSubscribe("DoManagement")]
        private void OnDoManagement(object sender, EventArgs e)
        {
            if (Clock.Today.Date == SowingDate)
            {
                KiwiFruit.Sow(cultivar: CropToSow, population: 9, depth: InitialRootDepth, rowSpacing: 500);}            
            
            
        }
    }
}
```
  Memo ToDoList
    Things we need to improve for next run:

    1. Reset soil at StartGrowth for each crop

    2. Tailor soil parameters to each crops (now it's single SCRUM s-map set up)

    3. Output DOY when key events occur (Sowing | Flowering | Harvest)

    4. Done: Output explaining variables: Cycle length | Light Interception | RUE | FlowerNumber | ProductSize

    5. N dynamics in soil/plant and N fertiliser application in response - not present -
  DataStore
  Folder Replacements
    Plant KiwiFruit: PlantType=KiwiFruit
      BiomassArbitrator Arbitrator
        Memo
          The partitioning of biomass to fodder beet organs follows a "Relative Allocation" routine (see Arbitrator module documentation) guided by coefficients derived from the October sowing date data of the test dataset
        PlantPartitionFractions
          Constant StorageRootFraction: FixedValue=1
          Constant LeafFraction: FixedValue=0
          Constant PetioleFraction: FixedValue=0
          Constant RootFraction: FixedValue=0
        PlantNutrientsDelta Carbon
        PlantNutrientsDelta Nitrogen
      RootUptakesArbitrator
      Phenology
        Memo
          The fodder beet model is described for growth and dry matter production using solar radiation and temperature
          as driving functions. The effect of temperature is quantified using a thermal-time accumulation function.
          Thermal-time is calculated in degree days for ambient temperature above a base temperature (Tbase). Tbase is
          assumed to be 0°C ([Chakwizira_etal_2016a]).
        MultiplyFunction ThermalTime
          PhaseLookup
            PhaseLookupValue SoilTemperature: Start=Sowing; End=Germination
              Constant ThermalTime: FixedValue=15
              Memo
                The effect of soil temperature can go beyond germination as has been demonstrated in previous studies
                ([Stone_etal_1998]).
            PhaseLookupValue AirTemperature: Start=Germination; End=Maturity
              SubDailyInterpolation ThermalTime: agregationMethod=0
                XYPairs Response: X=[0, 25, 30, 45]; Y=[0, 25, 25, 0]
                ThreeHourAirTemperature InterpolationMethod
              Memo
                Temperature is extrapolated to 3-hourly values from daily maximum and minimum using a sinusoidal function, and thermal-time accumulation is calculated for each period and combined to give daily values ([Jones_etal_1986]). The optimum temperature was set at 25–30°C with a maximum of 45°C, targets assumed similar to those of sugar beet reported by ([Ober_Rajabi_2010]) and ([Sanghera_etal_2016]).
          AddFunction DroughtPhenologyAcelleration
            Constant One: FixedValue=1
            MultiplyFunction Stress
              Constant StressResponseCoefficient: FixedValue=2
              LinearInterpolationFunction StressFactor
                XYPairs: X=[0, 1]; Y=[0, 0]
                VariableReference XValue: VariableName=[KiwiFruit].Leaf.Canopy.Fw
        GerminatingPhase Germinating: Start=Sowing; End=Germination; IsEmerged=false
          Constant MinSoilTemperature: FixedValue=0
        EmergingPhase Emerging: Start=Germination; End=Emergence; IsEmerged=true; TTForTimeStep=0
          VariableReference ThermalTime: VariableName=[Phenology].ThermalTime
          Memo
            This is an empirical fit where 12.5°Cd per mm sowing depth is assumed based on the 2014 sowing date trial results ([Khaembah_etal_2017]).
          AddFunction Target
            Constant ShootLag: FixedValue=0
            MultiplyFunction DepthxRate
              Constant ShootRate: FixedValue=12.5
              VariableReference: VariableName=[Plant].SowingData.Depth
        GenericPhase Vegetative: Start=Emergence; End=InitialReproductive; IsEmerged=true
          VariableReference Progression: VariableName=[Phenology].ThermalTime
          MultiplyFunction Target
            LinearInterpolationFunction PhotoPeriodResponse
              XYPairs: X=[13, 16]; Y=[1, 1]
              VariableReference XValue: VariableName=[Phenology].Photoperiod
            Constant MaxThermalTimeToBolt: FixedValue=3000; Units=oCd
            Memo
              The effect of photoperiod on the vegetative phase is assumed neglible. The maximum TT of 3200°Cd based on the 2014 October sowing date data([Khaembah_etal_2017]) is used here.
        GenericPhase EarlyReproductive: Start=InitialReproductive; End=StartBolting; IsEmerged=true
          Constant Target: FixedValue=1; Units=oCd
          Memo
            This an empirical fit - 400°Cd estimated from the 2014 sowing date trial ([Khaembah_etal_2017]).
          LinearInterpolationFunction Progression
            XYPairs: X=[13, 14]; Y=[0, 1]
            VariableReference XValue: VariableName=[Phenology].Photoperiod
        GenericPhase Bolt: Start=StartBolting; End=EndBolting; IsEmerged=true
          VariableReference Progression: VariableName=[Phenology].ThermalTime
          Constant Target: FixedValue=800
          Memo
            The 800°Cd is is an empirical fit based on the 2014 sowing date trial ([Khaembah_etal_2017]).
        EndPhase Maturity: Start=EndBolting; End=Maturity; IsEmerged=true
          Constant Target: FixedValue=15000
          VariableReference ThermalTime: VariableName=[Phenology].ThermalTime
          Memo
            This is estimated to be 3600°Cd
            A value of 3600°Cd (i.e. sum of °Cd from crop emergence to the end of the vegetative phase) is assumed for the duration of the [?]Maturityâ€ phase. Accumulated thermal time (TTsum) for each phase (planted–vegetative) was empirically derived from the 2014 sowing date data ([Khaembah_etal_2017]).
        AccumulateFunction AccumulatedThermalTime: StartStageName=Emergence; EndStageName=Maturity; FractionRemovedOnCut=0; FractionRemovedOnHarvest=0; FractionRemovedOnGraze=0; FractionRemovedOnPrune=0
          VariableReference: VariableName=[Phenology].ThermalTime
        PhotoperiodFunction Photoperiod: Twilight=-6; DayLength=0
      Organ StorageRoot: Cconc=0.4; IsAboveGround=true
        Constant InitialWt: FixedValue=0
        Respiration
          Constant MaintenanceRespirationFunction: FixedValue=0; Units=0-1
          NutrientFunctions AssimilationCostFunctions
            Constant C: FixedValue=0; Units=0-1
            Constant N: FixedValue=0; Units=0-1
            Constant P: FixedValue=0; Units=0-1
            Constant K: FixedValue=0; Units=0-1
          NutrientFunctions MobilisationCostFunctions: same as Replacements.KiwiFruit.StorageRoot.Respiration.AssimilationCostFunctions
        Constant SenescenceRate: FixedValue=0; Units=/d
        Constant DetachmentRate: FixedValue=0; Units=/d
        OrganNutrientDelta Carbon: MaxCDelta=0
          OrganNutrientSupplies Supplies: Fixation=0; Uptake=0
            NutrientPoolsState ReAllocation
            NutrientPoolsState ReTranslocation
          NutrientDemandFunctions DemandFunctions
            DeficitDemandFunction Structural
            DeficitDemandFunction Metabolic
            DeficitDemandFunction Storage
            Constant QStructuralPriority: FixedValue=79.7034
            Constant QMetabolicPriority: FixedValue=79.7034
            Constant QStoragePriority: FixedValue=100
          NutrientProportionFunctions PoolFractions
            CalculateCarbonFractionFromNConc Structural
            CalculateCarbonFractionFromNConc Metabolic
            CalculateCarbonFractionFromNConc Storage
          NutrientSupplyFunctions SupplyFunctions
            Constant Fixation: FixedValue=0
            Constant Uptake: FixedValue=0
            NutrientPoolFunctions ReAllocation
              Constant Structural: FixedValue=0
              MobilisationSupplyFunction Metabolic
                Constant Multiplier: FixedValue=1
              MobilisationSupplyFunction Storage
                Constant Multiplier: FixedValue=1
            NutrientPoolFunctions ReTranslocation
              Constant Structural: FixedValue=0
              MobilisationSupplyFunction Metabolic
                Constant Multiplier: FixedValue=0
              MobilisationSupplyFunction Storage
                Constant Multiplier: FixedValue=0
        OrganNutrientDelta Nitrogen: MaxCDelta=0
          OrganNutrientSupplies Supplies: Fixation=0; Uptake=0
            NutrientPoolsState ReAllocation
            NutrientPoolsState ReTranslocation
          NutrientDemandFunctions DemandFunctions
            DeficitDemandFunction Structural
            DeficitDemandFunction Metabolic
            DeficitDemandFunction Storage
            Constant QStructuralPriority: FixedValue=100
            Constant QMetabolicPriority: FixedValue=100
            Constant QStoragePriority: FixedValue=100
          NutrientSupplyFunctions SupplyFunctions: same as Replacements.KiwiFruit.StorageRoot.Carbon.SupplyFunctions
          NutrientConcentrationFunctions ConcFunctions
            LinearInterpolationFunction Maximum
              XYPairs: X=[0, 10, 40, 60]; Y=[0.02, 0.02, 0.01, 0.01]
              VariableReference XValue: VariableName=[Leaf].NodeNumber
              Memo
                These values have been fitted to the available data. The fitted values are within the observed maximum and minimum values obtained in the FACTS soybean experiments ([ARCHONTOULIS2020721]).
            MinimumFunction Critical
              Constant MaxNConc: FixedValue=0.01
              MultiplyFunction CritNConc
                VariableReference MinNConc: VariableName=[StorageRoot].Nitrogen.ConcFunctions.Minimum
                Constant CritNFactor: FixedValue=1.5
            Constant Minimum: FixedValue=0.004
        MultiplyFunction TotalDMDemand
          PhaseLookup PartitionFraction
            PhaseLookupValue NonReproductive: Start=Emergence; End=InitialReproductive
              LinearInterpolationFunction PartitionFraction
                XYPairs: X=[1, 6, 17, 20, 25]; Y=[0, 0, 1, 1, 1]
                Memo
                  Allocation determined by node number - partitioning coefficients have been determined using the 2014 sowing date October data ([Khaembah_etal_2017]).
                VariableReference XValue: VariableName=[Leaf].NodeNumber
            PhaseLookupValue Reproductive: Start=InitialReproductive; End=EndBolting
              Constant InitialWtFunction: FixedValue=0; Units=g/m^2
          VariableReference PotentialPhotosynthesis: VariableName=[Leaf].Photosynthesis
        BiomassRemoval BiomassRemovalDefaults: HarvestFractionLiveToRemove=0.95; HarvestFractionDeadToRemove=0; HarvestFractionLiveToResidue=0.05; HarvestFractionDeadToResidue=1
        MultiplyFunction TotalCarbonDemand
          VariableReference TotalDMDemand: VariableName=[StorageRoot].TotalDMDemand
          VariableReference Cconc: VariableName=[StorageRoot].Cconc
      Organ Leaf: Cconc=0.4; IsAboveGround=true
        Constant InitialWt: FixedValue=1; Units=g/m2
        Respiration: same as Replacements.KiwiFruit.StorageRoot.Respiration
        AddFunction SenescenceRate
          MultiplyFunction CoverEffect
            LinearInterpolationFunction RelativeRate
              XYPairs: X=[0, 0.25, 0.5, 0.75, 1]; Y=[0, 0, 0.0918195, 1, 1]
              Memo
                The maximum height of 500 mm was estimated from the 2014 sowing date trial ([Khaembah_etal_2017]).
              VariableReference XValue: VariableName=[Leaf].Canopy.CoverTotal
            Constant MaxRate: FixedValue=0.0001; Units=/d
          MultiplyFunction AgeEffect
            LinearInterpolationFunction RelativeRate
              XYPairs: X=[0, 15, 30, 45]; Y=[0, 0.0884405, 0.226871, 1]
              Memo
                The maximum height of 500 mm was estimated from the 2014 sowing date trial ([Khaembah_etal_2017]).
              VariableReference XValue: VariableName=[Leaf].NodeNumber
            Constant MaxRate: FixedValue=0.00996065; Units=/d
        Constant DetachmentRate: FixedValue=0; Units=/d
        OrganNutrientDelta Carbon: MaxCDelta=0
          OrganNutrientSupplies Supplies: Fixation=0; Uptake=0
            NutrientPoolsState ReAllocation
            NutrientPoolsState ReTranslocation
          NutrientDemandFunctions DemandFunctions
            DeficitDemandFunction Structural
            DeficitDemandFunction Metabolic
            DeficitDemandFunction Storage
            Constant QStructuralPriority: FixedValue=100
            Constant QMetabolicPriority: FixedValue=100
            Constant QStoragePriority: FixedValue=0
          NutrientSupplyFunctions SupplyFunctions
            MultiplyFunction Fixation
              VariableReference Fixation: VariableName=[Leaf].Photosynthesis
              VariableReference Cconc: VariableName=[Leaf].Cconc
            Constant Uptake: FixedValue=0
            NutrientPoolFunctions ReAllocation
              Constant Structural: FixedValue=0
              MobilisationSupplyFunction Metabolic
                Constant Multiplier: FixedValue=1
              MobilisationSupplyFunction Storage
                Constant Multiplier: FixedValue=1
              MultiplyFunction Metabolic1 (disabled)
                Constant CrudeProteinFactor: FixedValue=0; Units=6.25
                VariableReference NitrogenReAllocation: VariableName=[Leaf].Nitrogen.Supplies.ReAllocation.Metabolic
              MultiplyFunction Storage1 (disabled)
                Constant CrudeProteinFactor: FixedValue=0; Units=6.25
                VariableReference NitrogenReAllocation: VariableName=[Leaf].Nitrogen.Supplies.ReAllocation.Metabolic
            NutrientPoolFunctions ReTranslocation
              Constant Structural: FixedValue=0
              MobilisationSupplyFunction Metabolic
                Constant Multiplier: FixedValue=0
              MobilisationSupplyFunction Storage
                Constant Multiplier: FixedValue=0.5
          NutrientProportionFunctions PoolFractions: same as Replacements.KiwiFruit.StorageRoot.Carbon.PoolFractions
        OrganNutrientDelta Nitrogen: MaxCDelta=0
          OrganNutrientSupplies Supplies: Fixation=0; Uptake=0
            NutrientPoolsState ReAllocation
            NutrientPoolsState ReTranslocation
          NutrientDemandFunctions DemandFunctions
            DeficitDemandFunction Structural
            DeficitDemandFunction Metabolic
            DeficitDemandFunction Storage
            Constant QStructuralPriority: FixedValue=56.642
            Constant QMetabolicPriority: FixedValue=56.642
            Constant QStoragePriority: FixedValue=20.4379
          NutrientSupplyFunctions SupplyFunctions
            Constant Fixation: FixedValue=0
            Constant Uptake: FixedValue=0
            NutrientPoolFunctions ReAllocation: same as Replacements.KiwiFruit.StorageRoot.Carbon.SupplyFunctions.ReAllocation
            NutrientPoolFunctions ReTranslocation: same as Replacements.KiwiFruit.Leaf.Carbon.SupplyFunctions.ReTranslocation
          NutrientConcentrationFunctions ConcFunctions
            LinearInterpolationFunction Maximum
              XYPairs: X=[0, 10, 40, 60]; Y=[0.045, 0.045, 0.035, 0.035]
              VariableReference XValue: VariableName=[Leaf].NodeNumber
              Memo
                These values have been fitted to the available data. The fitted values are within the observed maximum and minimum values obtained in the FACTS soybean experiments ([ARCHONTOULIS2020721]).
            MinimumFunction Critical
              Constant MaxNConc: FixedValue=0.035
              MultiplyFunction CritNConc
                VariableReference MinNConc: VariableName=[Leaf].Nitrogen.ConcFunctions.Minimum
                Constant CritNFactor: FixedValue=1.57072
            Constant Minimum: FixedValue=0.0135454
        EnergyBalance Canopy: Albedo=0.2; Gsmax350=0.0103149; R50=59.6895; KDead=0; LAIDead=0
          MinimumFunction FRGRer
            VariableReference RUE_FT: VariableName=[Leaf].Photosynthesis.FT
            MinimumFunction Others
              VariableReference RUE_FN: VariableName=[Leaf].Photosynthesis.FN
              VariableReference RUE_FVPD: VariableName=[Leaf].Photosynthesis.FVPD
          StomatalConductanceCO2Modifier
            VariableReference PhotosynthesisCO2Modifier: VariableName=[Leaf].Photosynthesis.FCO2
          LinearInterpolationFunction Tallness
            XYPairs: X=[0, 24]; Y=[20, 500]
            Memo
              The maximum height of 500 mm was estimated from the 2014 sowing date trial ([Khaembah_etal_2017]).
            VariableReference XValue: VariableName=[Leaf].NodeNumber
          VariableReference Deepness: VariableName=[Leaf].Canopy.Height
          MultiplyFunction DeadAreaIndex
            VariableReference SLA: VariableName=[Leaf].SpecificArea
            VariableReference LeafDeadWt: VariableName=[Leaf].Dead.Wt
          MultiplyFunction GreenAreaIndex
            VariableReference SLA: VariableName=[Leaf].SpecificArea
            AddFunction LiveNonStorageWt
              VariableReference LeafLiveStructuralWt: VariableName=[Leaf].Live.Weight.Structural
              VariableReference LeafLiveMetabolicWt: VariableName=[Leaf].Live.Weight.Metabolic
            DivideFunction StorageWtCorrectionFactor
              Constant One: FixedValue=1
              AddFunction LiveNonStorageWtFract
                VariableReference LeafLiveStructuralWtFract: VariableName=[Leaf].Carbon.PoolFractions.Structural
                VariableReference LeafLiveMetabolicWtFract: VariableName=[Leaf].Carbon.PoolFractions.Metabolic
          MultiplyFunction GreenExtinctionCoefficient
            Constant PotentialExtinctionCoeff: FixedValue=0.95
              Memo
                The extinction coefficient value of 0.74 ([Chakwizira_etal_2016a]) was used.
            LinearInterpolationFunction WaterStress
              XYPairs: X=[0, 0.641792, 1]; Y=[0.5, 1, 1]
              VariableReference XValue: VariableName=[KiwiFruit].Leaf.Canopy.Fw
          Constant Wideness: FixedValue=0
          Constant DeadExtinctionCoefficient: FixedValue=0.578136
        RUEModel Photosynthesis
          Constant RUE: FixedValue=1.8
          Constant FNconst: FixedValue=1
          Constant FVPD: FixedValue=1
          LinearInterpolationFunction FW
            XYPairs: X=[0, 0.554282, 1]; Y=[0, 1, 1]
            VariableReference XValue: VariableName=[Leaf].Canopy.Fw
          WeightedTemperatureFunction FT: MaximumTemperatureWeighting=0.75
            XYPairs: X=[0, 14.1007, 30, 45]; Y=[0, 1, 1, 0]
          RUECO2Function FCO2: PhotosyntheticPathway=C3
          VariableReference RadnInt: VariableName=[Leaf].Canopy.RadiationIntercepted
          LinearInterpolationFunction FN
            XYPairs: X=[0, 1, 1.5]; Y=[0, 1, 1]
            VariableReference XValue: VariableName=[Leaf].FNmetabolic
        DivideFunction TotalDMDemand
          VariableReference DeltaLAI: VariableName=[Leaf].DeltaLAI
          VariableReference SLA: VariableName=[Leaf].SpecificArea
          Memo
            Growth in leaf area is used to calculate the leaf dry matter demand. The same was assumed in the original crop models in APSIM. Further model development can be taken once new experimental data for metabolic, structural and storage forms are provided.
          Memo Memo1
            DeltaLAI describes the LAI variation over the cycle and is calculated using the Area of Largest Leaf, relative leaf area, plant number, branch number and leaf appearance rate (thermal time/phyllochron).
        PhaseLookup DeltaLAI
          Memo
            DeltaLAI describes the LAI variation over the cycle and is calculated using the Area of Largest Leaf, relative leaf area, plant number, branch number and leaf appearance rate (thermal time/phyllochron).
          PhaseLookupValue Vegetative: Start=Emergence; End=StartBolting
            MultiplyFunction Delta
              VariableReference AreaLargestLeaf: VariableName=[Leaf].AreaLargestLeaf
              LinearInterpolationFunction RelativeArea
                XYPairs: X=[1, 8.7948, 20, 124.988]; Y=[0.05, 0.5, 1, 0.2]
                VariableReference XValue: VariableName=[Leaf].NodeNumber
              VariableReference PlantNumber: VariableName=[KiwiFruit].SowingData.Population
              DivideFunction LAR
                VariableReference TT: VariableName=[Phenology].ThermalTime
                VariableReference Phyllochron: VariableName=[Leaf].Phyllochron
              LinearInterpolationFunction FW
                XYPairs: X=[0.290163, 0.814495, 2]; Y=[0, 1, 1]
                VariableReference XValue: VariableName=[Leaf].Canopy.Fw
          PhaseLookupValue Reproductive: Start=StartBolting; End=EndBolting
            Constant: FixedValue=0
        AccumulateFunction NodeNumber: StartStageName=Emergence; EndStageName=EndBolting; FractionRemovedOnCut=0; FractionRemovedOnHarvest=0; FractionRemovedOnGraze=0; FractionRemovedOnPrune=0
          DivideFunction DeltaNode
            VariableReference ThermalTime: VariableName=[Phenology].ThermalTime
            VariableReference Phyllochron: VariableName=[Leaf].Phyllochron
        PhaseLookupValue Phyllochron: Start=Emergence; End=EndBolting
          LinearInterpolationFunction Phyllochron
            XYPairs: X=[1, 3, 3.1]; Y=[100, 100, 50]
            VariableReference XValue: VariableName=[Leaf].NodeNumber
          Memo
            A two stage phyllochron (i.e. 100–50°Cd) is an empirical fit to get faster leaf appearance of the first 3 leaves. The
            50°Cd for the fourth and later-formed leaves is estimated from measured values of the 2014-2015 October sowing date treatment ([Khaembah_etal_2017]).
        MultiplyFunction SpecificArea
          LinearInterpolationFunction UnStressedSpecificArea
            XYPairs: X=[0, 40]; Y=[0.015, 0.019]
            VariableReference XValue: VariableName=[Leaf].NodeNumber
          LinearInterpolationFunction StressFactor
            XYPairs: X=[0, 0.5, 1]; Y=[0, 0.605141, 1]
            VariableReference XValue: VariableName=[Leaf].AccumulatedWaterStressEffect
        Constant AreaLargestLeaf: FixedValue=0.03; Units=m2
        BiomassRemoval BiomassRemovalDefaults: HarvestFractionLiveToRemove=0; HarvestFractionDeadToRemove=0; HarvestFractionLiveToResidue=1; HarvestFractionDeadToResidue=1
        LinearInterpolationFunction FrostFraction
          XYPairs: X=[-4, 4]; Y=[0, 0]
          VariableReference XValue: VariableName=[Weather].MinT
        MovingAverageFunction AccumulatedWaterStressEffect: NumberOfDays=30; StageToStartMovingAverage=Emergence
          VariableReference FW: VariableName=[Leaf].Canopy.Fw
        MultiplyFunction TotalCarbonDemand
          VariableReference TotalDMDemand: VariableName=[Leaf].TotalDMDemand
          VariableReference Cconc: VariableName=[Leaf].Cconc
      Organ Petiole: Cconc=0.4; IsAboveGround=true
        Constant InitialWt: FixedValue=1; Units=g/m2
        Respiration: same as Replacements.KiwiFruit.StorageRoot.Respiration
        VariableReference SenescenceRate: VariableName=[Leaf].senescenceRate
        Constant DetachmentRate: FixedValue=0; Units=/d
        OrganNutrientDelta Carbon: MaxCDelta=0
          OrganNutrientSupplies Supplies: Fixation=0; Uptake=0
            NutrientPoolsState ReAllocation
            NutrientPoolsState ReTranslocation
          NutrientDemandFunctions DemandFunctions
            DeficitDemandFunction Structural
            DeficitDemandFunction Metabolic
            DeficitDemandFunction Storage
            Constant QStructuralPriority: FixedValue=0
            Constant QMetabolicPriority: FixedValue=0
            Constant QStoragePriority: FixedValue=2.93089
          NutrientSupplyFunctions SupplyFunctions
            Constant Fixation: FixedValue=0
            Constant Uptake: FixedValue=0
            NutrientPoolFunctions ReAllocation: same as Replacements.KiwiFruit.StorageRoot.Carbon.SupplyFunctions.ReAllocation
            NutrientPoolFunctions ReTranslocation
              Constant Structural: FixedValue=0
              MobilisationSupplyFunction Metabolic
                Constant Multiplier: FixedValue=0
              MobilisationSupplyFunction Storage
                Constant Multiplier: FixedValue=0.222186
          NutrientProportionFunctions PoolFractions: same as Replacements.KiwiFruit.StorageRoot.Carbon.PoolFractions
        OrganNutrientDelta Nitrogen: MaxCDelta=0
          OrganNutrientSupplies Supplies: Fixation=0; Uptake=0
            NutrientPoolsState ReAllocation
            NutrientPoolsState ReTranslocation
          NutrientDemandFunctions DemandFunctions
            DeficitDemandFunction Structural
            DeficitDemandFunction Metabolic
            DeficitDemandFunction Storage
            Constant QStructuralPriority: FixedValue=0
            Constant QMetabolicPriority: FixedValue=0
            Constant QStoragePriority: FixedValue=100
          NutrientSupplyFunctions SupplyFunctions: same as Replacements.KiwiFruit.Leaf.Nitrogen.SupplyFunctions
          NutrientConcentrationFunctions ConcFunctions
            LinearInterpolationFunction Maximum
              XYPairs: X=[-, 0, 40, 60]; Y=[-, 0.03, 0.02, 0.02]
              VariableReference XValue: VariableName=[Leaf].NodeNumber
              Memo
                These values have been fitted to the available data. The fitted values are within the observed maximum and minimum values obtained in the FACTS soybean experiments ([ARCHONTOULIS2020721]).
            MinimumFunction Critical
              Constant MaxNConc: FixedValue=0.02
              MultiplyFunction CritNConc
                VariableReference MinNConc: VariableName=[petiole].Nitrogen.ConcFunctions.Minimum
                Constant CritNFactor: FixedValue=1.5
            Constant Minimum: FixedValue=0.01
        AllometricDemandFunction TotalDMDemand: Const=0.1; Power=1.5
          VariableReference XValue: VariableName=[Leaf].Live.Wt
          VariableReference YValue: VariableName=[Petiole].Live.Wt
        BiomassRemoval BiomassRemovalDefaults: HarvestFractionLiveToRemove=0; HarvestFractionDeadToRemove=0; HarvestFractionLiveToResidue=1; HarvestFractionDeadToResidue=1
        MultiplyFunction TotalCarbonDemand
          VariableReference TotalDMDemand: VariableName=[Petiole].TotalDMDemand
          VariableReference Cconc: VariableName=[Petiole].Cconc
      Organ Root: Cconc=0.4; IsAboveGround=false
        Constant InitialWt: FixedValue=0.5; Units=g/m2
        Respiration: same as Replacements.KiwiFruit.StorageRoot.Respiration
        Constant SenescenceRate: FixedValue=0; Units=/d
        Constant DetachmentRate: FixedValue=0; Units=/d
        OrganNutrientDelta Carbon: MaxCDelta=0
          OrganNutrientSupplies Supplies: Fixation=0; Uptake=0
            NutrientPoolsState ReAllocation
            NutrientPoolsState ReTranslocation
          NutrientDemandFunctions DemandFunctions
            DeficitDemandFunction Structural
            DeficitDemandFunction Metabolic
            DeficitDemandFunction Storage
            Constant QStructuralPriority: FixedValue=0
            Constant QMetabolicPriority: FixedValue=0
            Constant QStoragePriority: FixedValue=0
          NutrientSupplyFunctions SupplyFunctions: same as Replacements.KiwiFruit.StorageRoot.Carbon.SupplyFunctions
          NutrientProportionFunctions PoolFractions: same as Replacements.KiwiFruit.StorageRoot.Carbon.PoolFractions
        OrganNutrientDelta Nitrogen: MaxCDelta=0
          OrganNutrientSupplies Supplies: Fixation=0; Uptake=0
            NutrientPoolsState ReAllocation
            NutrientPoolsState ReTranslocation
          NutrientDemandFunctions DemandFunctions
            DeficitDemandFunction Structural
            DeficitDemandFunction Storage
            DeficitDemandFunction Metabolic
            Constant QStructuralPriority: FixedValue=1
            Constant QMetabolicPriority: FixedValue=1
            Constant QStoragePriority: FixedValue=0
          NutrientSupplyFunctions SupplyFunctions: same as Replacements.KiwiFruit.StorageRoot.Carbon.SupplyFunctions
          NutrientConcentrationFunctions ConcFunctions
            Constant Maximum: FixedValue=0.01
            Constant Critical: FixedValue=0.009
            Constant Minimum: FixedValue=0.0045
        RootNetwork Network
          RootShapeCylinder RootShape
          LinearInterpolationFunction KLModifier
            XYPairs: X=[0, 1]; Y=[1, 1]
            VariableReference XValue: VariableName=[Root].Network.LengthDensity
          Constant SoilWaterEffect: FixedValue=1
          Constant MaximumRootDepth: FixedValue=1400
          PhaseLookup RootFrontVelocity
            PhaseLookupValue Vegetative: Start=Germination; End=StartBolting
              MultiplyFunction Velocity
                Constant RFVmax: FixedValue=10; Units=mm/d
                VariableReference RUEstress: VariableName=[Leaf].Photosynthesis.FT
          Constant KNO3: FixedValue=0.02; Units=g/plant
          Constant KNH4: FixedValue=0.01; Units=g/plant
          LinearInterpolationFunction NUptakeSWFactor
            XYPairs: X=[0, 0.5, 1]; Y=[0, 0.2758, 1]
            VariableReference XValue: VariableName=[Root].Network.RWC
          Constant SpecificRootLength: FixedValue=40; Units=m/g
          LinearInterpolationFunction MaxDailyNUptake
            XYPairs: X=[0, 1000]; Y=[0, 100]
            Memo
              Early growth N uptake is assumed to be 0.1 kg N/ha/day, and this increases with root growth reaching a maximumof 5.8 kg N/ha/day. The maximum N uptake per day is assumed from sugar beet data (Armstrong et al., 1986).
            VariableReference XValue: VariableName=[Root].Wt
          Constant RootDepthStressFactor: FixedValue=1
        AllometricDemandFunction TotalDMDemand: Const=1; Power=1
          VariableReference XValue: VariableName=[Leaf].Live.Wt
          VariableReference YValue: VariableName=[Root].Live.Wt
        BiomassRemoval BiomassRemovalDefaults: HarvestFractionLiveToRemove=0; HarvestFractionDeadToRemove=0; HarvestFractionLiveToResidue=1; HarvestFractionDeadToResidue=1
        MultiplyFunction TotalCarbonDemand
          VariableReference TotalDMDemand: VariableName=[Root].TotalDMDemand
          VariableReference Cconc: VariableName=[Root].Cconc
      CompositeStates AboveGround
        Propertys=[[Leaf].Live, [Leaf].Dead, [StorageRoot].Live, [StorageRoot].Dead, [Petiole].Live, [Petiole].Dead]
      CompositeStates AboveGroundDead: Propertys=[[Leaf].Dead, [StorageRoot].Dead, [Petiole].Dead]
      CompositeStates BelowGround: Propertys=[[Root].Live, [Root].Dead]
      CompositeStates Total
        Propertys=[[Leaf].Live, [Leaf].Dead, [StorageRoot].Live, [StorageRoot].Dead, [Petiole].Live, [Petiole].Dead, [Root].Live, [Root].Dead]
      CompositeStates TotalLive
        Propertys=[[Leaf].Live, [Petiole].Live, [StorageRoot].Live, [Root].Live]
      CompositeStates TotalDead
        Propertys=[[Leaf].Dead, [Petiole].Dead, [StorageRoot].Dead, [Root].Dead]
      LinearInterpolationFunction MortalityRate
        XYPairs: X=[0.98, 1]; Y=[0, 0]
        VariableReference XValue: VariableName=[Leaf].Canopy.CoverGreen
      AddFunction SCS (disabled)
        VariableReference Storage: VariableName=[StorageRoot].Live.Weight.Storage
        VariableReference Metabolic: VariableName=[StorageRoot].Live.Weight.Metabolic
        Memo
          Non structural carbohydrates and sugars
      Folder Cultivars
        Cultivar Heywood
      Constant seedMortalityRate: FixedValue=0
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